R_load := 100
R_contact := 400
R_out := 0.0001
R_total := (R_load + R_contact)*2 = 1000
I_v := 0.001
V_1 := ((R_load + R_contact)*2 + R_out)*I_v = 1
V_11 := I_v*R_out = 1e-7
Error_1 := V_11/V_1 = 1e-7
R_v := 1000000000
I_c := 10
I_divide := I_c*R_out/(R_out + R_total + R_v) = 9.99999e-13
V_2 := ((R_load + R_contact)*2)*I_divide + R_out*(I_c - I_divide) = 0.001
V_e := ((R_load + R_contact)*2)*I_divide = 9.99999e-10
V_22 := R_out*(I_c - I_divide) = 0.001
Error_2 := V_22/V_2 = 0.999999
